C_9 := 3.3*10^-6
C_12 := 3.3*10^-6
R_7 := 1*10^6
R_6 := 100*10^3
ω(f) := 2*π*f
R_10 := 10*10^6
R_9 := 100*10^3
C_10 := 33*10^-9
C_13 := 1*10^-9
X_c9(f) := 1/(ω(f)*C_9)
X_c10(f) := 1/(ω(f)*C_10)
X_c12(f) := 1/(ω(f)*C_12)
X_c13(f) := 1/(ω(f)*C_13)
R_o(f) := R_7*(-1i*X_c10(f))/(R_7 - 1i*X_c10(f))
R_o1(f) := R_10*(-1i*X_c13(f))/(R_10 - 1i*X_c13(f))
R_o2(f) := R_6 - 1i*X_c9(f)
R_o12(f) := R_9 - 1i*X_c12(f)
X_c9(1) = 48228.8
A(f) := (R_o(f) + R_o2(f))/R_o2(f)
A_1(f) := (R_o1(f) + R_o12(f))/R_o12(f)
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R1 := 100*10^3
R2 := 10*10^6
f_1 := 0.5
f_2 := 15
C2 := 1/(2*π*R2*f_2) = 1.06103e-9
C1 := 1/(2*π*R1*f_1) = 3.1831e-6
It := 225*10^-3  # мА*ч
I[1] := 3.2*10^-9
I[2] := 3*10^-6
I_omax := 2.4*10^-6
I[3] := 12*10^-9
f_p := 25000
I_adc := 7*10^-6
R1 := (1.8 - 0)/I_omax = 750000
I_оу := 25*10^-6  # А
I_ldo := 25*10^-9
I_d := 50*10^-3
PPF := 50
Duty := 0.002
C_1 := 1/(2*π*R_1*f_p)  # error: Эта переменная не определена.
T_on := 1/PPF*Duty = 4e-5
I_vd := I_d*PPF*T_on = 0.0001
I_потр := I_оу*3 + I_ldo + sum(I[i], i = 1 .. 3) + I_adc + I_vd = 0.00018504
t := 14*24 = 336  # ч
Q := I_потр*t = 0.0621735  # мА*ч
end := Q/It = 27.6327 %
C_8 := 3.3*10^-6
R_a := 250*10^3
f_2 := 1/(2*π*C_8*R_a/2) = 0.38583
C_67 := 10*10^-6
L_1 := 10*10^-6
f_clc := 1/(π*sqrt(L_1*2*C_67)) = 22507.9
